# Расчет РД на топливной паре несимметричный диметилгидразин + азотный тетраоксид
# Количество камер, шт
nк := 4
# Давление продуктов сгорания в камере сгорания, МПа
Pкс := 10
# Давление продуктов сгорания на срезе сопла, МПа
Pср := 0.1
H₂NN(CH₃)₂ + 2 N₂O₄ → 2 CO₂ + 3 N₂ + 4 H₂O
# Суммарная тяга двигателя, кН
CO2 := 2*44 = 88
Pсум := 2080  # общие моли =9моль
# Тяга одной камеры, кН
N2 := 3*28 = 84
H2O := 4*18 = 72
Pк := Pсум/nк
Pк = 520
# общая масса=88+84+72=244г
# Универсальная газовая постоянная, Дж/кгК | ср молекулярный вес = 244/9=27,1г/моль=μкс
Ro := 8314
# Примерные значения продуктов сгорания по итогам термодинамического расчета
# Температура продуктов сгорания в камере сгорания, К
Tкс := 3350
# Молекулярный вес продуктов сгорания в камере сгорания, г/моль
μкс := 27.1
# Газовая постоянная продуктов сгорания в камере сгорания,Дж/кгК
Rкс := Ro/μкс
Rкс = 306.79
# Показатель адиабаты
k := 1.3
# Скорость звука, м/с
a := sqrt(k*Rкс*Tкс)
a = 1155.88
# Критическая скорость продуктов сгорания, м/с
aкр := sqrt(2*k/(k + 1)*(Rкс*Tкс))
aкр = 1077.87
# Давление продуктов сгорания в критическом сечении, Па
Pкр := Pкс*10^6*(2/(k + 1))^(k/(k - 1))
Pкр = 5457277
# Температура продуктов сгорания в критическом сечении, К
Tкр := Tкс*2/(k + 1)
Tкр = 2913.04
# Скорость истечения продуктов сгорания на срезе сопла, м/с
Wср := sqrt(2*k/(k - 1)*(Rкс*Tкс)*(1 - (Pср/Pкс)^((k - 1)/k)))
Wср = 2414.46
# Геометрическая степень расширения сопла
Fот := (2/(k + 1))^(1/(k - 1))*sqrt((k - 1)/(k + 1))/((Pср/Pкс)^(1/k)*sqrt(1 - (Pср/Pкс)^((k - 1)/k)))
Fот = 9.68012
# Примем равенство газовых постоянных в камере сгорания и на срезе сопла.
νк := Rкс*Tкс/(Pкс*10^6)
νк = 0.102775
νср := Rкс*Tкс/(Pср*10^6)
νср = 10.2775
# Удельная площадь среза сопла и критического сечения, м^2с/кг
fср := νср/Wср
fср = 0.00425663
fкр := fср/Fот
fкр = 0.000439728
# Теоретический удельный импульс в пустоте, м/с
Io := Wср + fср*Pср*10^6
Io = 2840.12
# Теоретический массовый расход топлива, кг/с
mo := Pк*10^3/Io
mo = 183.091
# Теоретическая площадь критического сечения и среза сопла, м^2
Fкро := fкр*mo
Fкро = 0.0805102
Fсро := fср*mo
Fсро = 0.779348
# Диаметр критического сечения и среза сопла, м
dкр := sqrt(4*Fкро/π)
dкр = 0.32017
dср := sqrt(4*Fсро/π)
dср = 0.996141
# Теоретический расходный комплекс, м/с
βтеор := Pкс*10^6*Fкро/mo
βтеор = 4397.28
# Теоретический коэффициент тяги
Kтеор := (Pк*10^3)/(Pкс*10^6*Fкро)
Kтеор = 0.645881
# Определим стехиометрическое соотношение компонентов кислород керосин
# H₂NN(CH₃)₂ + 2 N₂O₄ → 2 CO₂ + 3 N₂ + 4 H₂O
# Молекулярные массы H₂NN(CH₃)₂ при моль 1
8*1 + 12*2 + 14*2 = 60  # г/моль
# Молекулярные массы N₂O₄ при моль 1
14*2 + 16*4 = 92
# Масса НДМГ
mндмг := 60*1
# масса ат
mат := 92*2 = 184
αо := mат/mндмг
αо = 3.06667
# Реальное соотношение компонентов для топливной пары
αр := 0.25
# Реальный коэффициент соотношения будет равен
Kр := αо*αр
Kр = 0.766667
# Реальный удельный импульс, м/с
# Потери в камере
φк := 0.97
# Потери в сопле
φс := 0.98
# Тепловые потери
φтепл := 0.95
Iр := Io*φк*φс*φтепл
Iр = 2564.83
# Реальный массовый расход топлива, кг/с
mт := (Pк*10^3)/Iр
mт = 202.742
# Массовый расход окислителя, кг/с
mок := Kр/(Kр + 1)*mт
mок = 87.9826
# Массовый расход горючего, кг/с
mг := 1/(Kр + 1)*mт
mг = 114.76
# Действительная площадь минимального сечения и среза сопла, м^2
Fкрр := Fкро/(φк*φс*φтепл)
Fкрр = 0.0891517
Fсрр := Fсро/(φк*φс*φтепл)
Fсрр = 0.862999
# Действительный диаметр критического сечения и среза сопла, м
dкрр := sqrt(4*Fкрр/π)
dкрр = 0.336915
dсрр := sqrt(4*Fсрр/π)
dсрр = 1.04824
# Действительный расходный комплекс, м/с
βр := Pкс*10^6*Fкрр/mт
βр = 4397.28
# Действительный коэффициент тяги
Kр := (Pк*10^3)/(Pкс*10^6*Fкрр)
Kр = 0.583276
t1 := 21900/((10.0 + 20 + 30.0)*1000/(504.5 + 525.5 + 540.5)) = 573.233  # c
mок1 := t1*mок = 50434.5  # кг
mг1 := t1*mг = 65784.1  # кг
t2 := (80000 - 21900)/((30.0 + 39.8 + 50.1 + 59.7 + 69.8 + 80.3)*1000/(540.5 + 552.0 + 562.0 + 570.0 + 577.5 + 584.5)) = 596.772  # c
mок2 := t2*mок = 52505.5  # кг
mг2 := t2*mг = 68485.5  # кг
mок1 + mок2 + mг1 + mг2 = 237210
# температура торможения
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Tо := 267*(1 + 0.2*(2741.5/a)^2) = 567.392
