# Расчет РД на топливной паре нитрометан+нитрометан
# Количество камер, шт
nк := 4
# Давление продуктов сгорания в камере сгорания, МПа
Pкс := 10
# Давление продуктов сгорания на срезе сопла, МПа
Pср := 0.1
CH3NO2 := CO + H2O + 0.5*N2 + 0.5*H2  # error: Эта переменная не определена.
# Суммарная тяга двигателя, кН
CO := 28
N2 := 0.5*28 = 14  # общие моли =3моль
Pсум := 2080
# Тяга одной камеры, кН
H2 := 0.5*2 = 1
H2O := 18
Pк := Pсум/nк
Pк = 520  # общая масса=14+1+18+28=61г
# Универсальная газовая постоянная, Дж/кгК | ср молекулярный вес = 61/=20.3г/моль=μкс
Ro := 8314
# Примерные значения продуктов сгорания по итогам термодинамического расчета
# Температура продуктов сгорания в камере сгорания, К
Tкс := 2200
# Молекулярный вес продуктов сгорания в камере сгорания, г/моль
μкс := 20.3
# Газовая постоянная продуктов сгорания в камере сгорания,Дж/кгК
Rкс := Ro/μкс
Rкс = 409.557
# Показатель адиабаты
k := 1.2
# Скорость звука, м/с
a := sqrt(k*Rкс*Tкс)
a = 1039.82
# Критическая скорость продуктов сгорания, м/с
aкр := sqrt(2*k/(k + 1)*(Rкс*Tкс))
aкр = 991.431
# Давление продуктов сгорания в критическом сечении, Па
Pкр := Pкс*10^6*(2/(k + 1))^(k/(k - 1))
Pкр = 5644739
# Температура продуктов сгорания в критическом сечении, К
Tкр := Tкс*2/(k + 1)
Tкр = 2000
# Скорость истечения продуктов сгорания на срезе сопла, м/с
Wср := sqrt(2*k/(k - 1)*(Rкс*Tкс)*(1 - (Pср/Pкс)^((k - 1)/k)))
Wср = 2407
# Геометрическая степень расширения сопла
Fот := (2/(k + 1))^(1/(k - 1))*sqrt((k - 1)/(k + 1))/((Pср/Pкс)^(1/k)*sqrt(1 - (Pср/Pкс)^((k - 1)/k)))
Fот = 11.871
# Примем равенство газовых постоянных в камере сгорания и на срезе сопла.
νк := Rкс*Tкс/(Pкс*10^6)
νк = 0.0901025
νср := Rкс*Tкс/(Pср*10^6)
νср = 9.01025
# Удельная площадь среза сопла и критического сечения, м^2с/кг
fср := νср/Wср
fср = 0.00374334
fкр := fср/Fот
fкр = 0.000315334
# Теоретический удельный импульс в пустоте, м/с
Io := Wср + fср*Pср*10^6
Io = 2781.34
# Теоретический массовый расход топлива, кг/с
mo := Pк*10^3/Io
mo = 186.96
# Теоретическая площадь критического сечения и среза сопла, м^2
Fкро := fкр*mo
Fкро = 0.0589549
Fсро := fср*mo
Fсро = 0.699857
# Диаметр критического сечения и среза сопла, м
dкр := sqrt(4*Fкро/π)
dкр = 0.273978
dср := sqrt(4*Fсро/π)
dср = 0.943973
# Теоретический расходный комплекс, м/с
βтеор := Pкс*10^6*Fкро/mo
βтеор = 3153.34
# Теоретический коэффициент тяги
Kтеор := (Pк*10^3)/(Pкс*10^6*Fкро)
Kтеор = 0.88203
# Определим стехиометрическое соотношение компонентов кислород керосин
CH3NO2 := CO + H2O + 0.5*N2 + 0.5*H2
# Молекулярные массы CH3NO2 при моль 1
12*1 + 14 + 3 + 16*2 = 61  # г/моль
# Масса нитрометана
mнтм := 61*1
αо := mнтм/mнтм
αо = 1
# Реальное соотношение компонентов для топливной пары
αр := 0
# Реальный коэффициент соотношения будет равен
Kр := αо*αр
Kр = 0
# Реальный удельный импульс, м/с
# Потери в камере
φк := 0.97
# Потери в сопле
φс := 0.98
# Тепловые потери
φтепл := 0.95
Iр := Io*φк*φс*φтепл
Iр = 2511.74
# Реальный массовый расход топлива, кг/с
mт := (Pк*10^3)/Iр
mт = 207.027
# Действительная площадь минимального сечения и среза сопла, м^2
Fкрр := Fкро/(φк*φс*φтепл)
Fкрр = 0.0652828
Fсрр := Fсро/(φк*φс*φтепл)
Fсрр = 0.774975
# Действительный диаметр критического сечения и среза сопла, м
dкрр := sqrt(4*Fкрр/π)
dкрр = 0.288307
dсрр := sqrt(4*Fсрр/π)
dсрр = 0.993342
# Действительный расходный комплекс, м/с
βр := Pкс*10^6*Fкрр/mт
βр = 3153.34
# Действительный коэффициент тяги
Kр := (Pк*10^3)/(Pкс*10^6*Fкрр)
Kр = 0.796534
# время маневра с от34 км до 80
t2 := (80000 - 21900)/((30.0 + 39.8 + 50.1 + 59.7 + 69.8 + 80.3)*1000/(540.5 + 552.0 + 562.0 + 570.0 + 577.5 + 584.5)) = 596.772  # c
# масса топлива
mобщ2 := t2*mт = 123548  # кг
# время маневра с до 34 км
t1 := 21900/((10.0 + 20 + 30.0)*1000/(504.5 + 525.5 + 540.5)) = 573.233
# масса топлива
mобщ1 := t1*mт = 118675
# температура торможения
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Tо := 267*(1 + 0.2*(2741.5/a)^2) = 638.193
