# Расчет РД на топливной паре нитрометан+о2
# Количество камер, шт
nк := 4
# Давление продуктов сгорания в камере сгорания, МПа
Pкс := 10
# Давление продуктов сгорания на срезе сопла, МПа
Pср := 0.1
CH3NO2 + 0.75*O2 := CO2 + 1.5*H2O + 0.5*N2  # error: Здесь необходимо указать имя.
# Суммарная тяга двигателя, кН
CO2 := 44
H2O := 1.5*18 = 27  # общие моли =3
Pсум := 2080
N2 := 0.5*28 = 14
# Тяга одной камеры, кН
Pк := Pсум/nк
Pк = 520  # общая масса=58+27=85г
# ср молекулярный вес = 85/3=28.3г/моль=μкс
# Универсальная газовая постоянная, Дж/кгК
Ro := 8314
# Температура продуктов сгорания в камере сгорания, К
Tкс := 2500
# Молекулярный вес продуктов сгорания в камере сгорания, г/моль
μкс := 28.3
# Газовая постоянная продуктов сгорания в камере сгорания,Дж/кгК
Rкс := Ro/μкс
Rкс = 293.781
# Показатель адиабаты
k := 1.1
# Скорость звука, м/с
a := sqrt(k*Rкс*Tкс)
a = 898.831
# Критическая скорость продуктов сгорания, м/с
aкр := sqrt(2*k/(k + 1)*(Rкс*Tкс))
aкр = 877.169
# Давление продуктов сгорания в критическом сечении, Па
Pкр := Pкс*10^6*(2/(k + 1))^(k/(k - 1))
Pкр = 5846793
# Температура продуктов сгорания в критическом сечении, К
Tкр := Tкс*2/(k + 1)
Tкр = 2380.95
# Скорость истечения продуктов сгорания на срезе сопла, м/с
Wср := sqrt(2*k/(k - 1)*(Rкс*Tкс)*(1 - (Pср/Pкс)^((k - 1)/k)))
Wср = 2350.98
# Геометрическая степень расширения сопла
Fот := (2/(k + 1))^(1/(k - 1))*sqrt((k - 1)/(k + 1))/((Pср/Pкс)^(1/k)*sqrt(1 - (Pср/Pкс)^((k - 1)/k)))
Fот = 15.0704
# Примем равенство газовых постоянных в камере сгорания и на срезе сопла.
νк := Rкс*Tкс/(Pкс*10^6)
νк = 0.0734452
νср := Rкс*Tкс/(Pср*10^6)
νср = 7.34452
# Удельная площадь среза сопла и критического сечения, м^2с/кг
fср := νср/Wср
fср = 0.00312403
fкр := fср/Fот
fкр = 0.000207296
# Теоретический удельный импульс в пустоте, м/с
Io := Wср + fср*Pср*10^6
Io = 2663.38
# Теоретический массовый расход топлива, кг/с
mo := Pк*10^3/Io
mo = 195.241
# Теоретическая площадь критического сечения и среза сопла, м^2
Fкро := fкр*mo
Fкро = 0.0404726
Fсро := fср*mo
Fсро = 0.609937
# Диаметр критического сечения и среза сопла, м
dкр := sqrt(4*Fкро/π)
dкр = 0.227005
dср := sqrt(4*Fсро/π)
dср = 0.881247
# Теоретический расходный комплекс, м/с
βтеор := Pкс*10^6*Fкро/mo
βтеор = 2072.96
# Теоретический коэффициент тяги
Kтеор := (Pк*10^3)/(Pкс*10^6*Fкро)
Kтеор = 1.28482
# Определим стехиометрическое соотношение компонентов кислород керосин
CH3NO2 + 0.75*O2 := CO2 + 1.5H2O + 0.5*N2  # error: Здесь необходимо указать имя.
# Молекулярные массы CH3NO2 при моль 1
12*1 + 14 + 3 + 16*2 = 61  # г/моль
# Молекулярные массы О_2
# 2*16 = 32 г/моль
# Масса нитрометана
mнтм := 61*1
# Масса кислорода
mкисл := 32*0.75
mкисл = 24
αо := mкисл/mнтм
αо = 0.393443
# Реальное соотношение компонентов для топливной пары
αр := 0.4
# Реальный коэффициент соотношения будет равен
Kр := αо*αр
Kр = 0.157377
# Реальный удельный импульс, м/с
# Потери в камере
φк := 0.97
# Потери в сопле
φс := 0.98
# Тепловые потери
φтепл := 0.95
Iр := Io*φк*φс*φтепл
Iр = 2405.22
# Реальный массовый расход топлива, кг/с
mт := (Pк*10^3)/Iр
mт = 216.196
# Массовый расход окислителя, кг/с
mок := Kр/(Kр + 1)*mт
mок = 29.3978
# Массовый расход горючего, кг/с
mг := 1/(Kр + 1)*mт
mг = 186.799
# Действительная площадь минимального сечения и среза сопла, м^2
Fкрр := Fкро/(φк*φс*φтепл)
Fкрр = 0.0448167
Fсрр := Fсро/(φк*φс*φтепл)
Fсрр = 0.675404
# Действительный диаметр критического сечения и среза сопла, м
dкрр := sqrt(4*Fкрр/π)
dкрр = 0.238877
dсрр := sqrt(4*Fсрр/π)
dсрр = 0.927335
# Действительный расходный комплекс, м/с
βр := Pкс*10^6*Fкрр/mт
βр = 2072.96
# Действительный коэффициент тяги
Kр := (Pк*10^3)/(Pкс*10^6*Fкрр)
Kр = 1.16028
# время маневра с до 25,7 км
t1 := 21900/((10.0 + 20 + 30.0)*1000/(504.5 + 525.5 + 540.5)) = 573.233  # c
# масса топлива | кг
mок1 := t1*mок = 16851.8  # кг
mг1 := t1*mг = 107079
mг1 = 107079
# температура торможения
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Tо := 267*(1 + 0.2*(2741.5/a)^2) = 763.777
(10.0 + 20 + 30.0)/(504.5 + 525.5 + 540.5) = 0.0382044
