# Расчет РД на топливной паре кислород+керосин
# Количество камер, шт
nк := 4
# Давление продуктов сгорания в камере сгорания, МПа
Pкс := 5
# Давление продуктов сгорания на срезе сопла, МПа
Pср := 0.1
C12H26 + 16*O2 := 8*CO + 4*CO2 + 13*H2O + 9*H2  # error: Здесь необходимо указать имя.
# Суммарная тяга двигателя, КН
CO := 8*28 = 224
CO2 := 4*44 = 176  # общие моли =8+4+13+9=34моль
Pсум := 2080
H2O := 13*18 = 234
# Тяга одной камеры, кН
H2 := 9*2 = 18
Pк := Pсум/nк
Pк = 520  # общая масса=CO+CO2+H2O+H2=652г
# ср молекулярный вес = 652/34=19.2г/моль=μкс
# Универсальная газовая постоянная, Дж/кгК
Ro := 8314
# Примерные значения продуктов сгорания по итогам термодинамического расчета
# Температура продуктов сгорания в камере сгорания, К
Tкс := 2100
# Молекулярный вес продуктов сгорания в камере сгорания, г/моль
μкс := 19.2
# Газовая постоянная продуктов сгорания в камере сгорания,Дж/кгК
Rкс := Ro/μкс
Rкс = 433.021
# Показатель адиабаты
k := 1.2
# Скорость звука, м/с
a := sqrt(k*Rкс*Tкс)
a = 1044.61
# Критическая скорость продуктов сгорания, м/с
aкр := sqrt(2*k/(k + 1)*(Rкс*Tкс))
aкр = 995.998
# Давление продуктов сгорания в критическом сечении, Па
Pкр := Pкс*10^6*(2/(k + 1))^(k/(k - 1))
Pкр = 2822370
# Температура продуктов сгорания в критическом сечении, К
Tкр := Tкс*2/(k + 1)
Tкр = 1909.09
# Скорость истечения продуктов сгорания на срезе сопла, м/с
Wср := sqrt(2*k/(k - 1)*(Rкс*Tкс)*(1 - (Pср/Pкс)^((k - 1)/k)))
Wср = 2286.24
# Геометрическая степень расширения сопла
Fот := (2/(k + 1))^(1/(k - 1))*sqrt((k - 1)/(k + 1))/((Pср/Pкс)^(1/k)*sqrt(1 - (Pср/Pкс)^((k - 1)/k)))
Fот = 7.04662
# Примем равенство газовых постоянных в камере сгорания и на срезе сопла.
νк := Rкс*Tкс/(Pкс*10^6)
νк = 0.181869
νср := Rкс*Tкс/(Pср*10^6)
νср = 9.09344
# Удельная площадь среза сопла и критического сечения, м^2с/кг
fср := νср/Wср
fср = 0.00397746
fкр := fср/Fот
fкр = 0.000564449
# Теоретический удельный импульс в пустоте, м/с
Io := Wср + fср*Pср*10^6
Io = 2683.99
# Теоретический массовый расход топлива, кг/с
mo := Pк*10^3/Io
mo = 193.742
# Теоретическая площадь критического сечения и среза сопла, м^2
Fкро := fкр*mo
Fкро = 0.109357
Fсро := fср*mo
Fсро = 0.7706
# Диаметр критического сечения и среза сопла, м
dкр := sqrt(4*Fкро/π)
dкр = 0.373146
dср := sqrt(4*Fсро/π)
dср = 0.990534
# Теоретический расходный комплекс, м/с
βтеор := Pкс*10^6*Fкро/mo
βтеор = 2822.25
# Теоретический коэффициент тяги
Kтеор := (Pк*10^3)/(Pкс*10^6*Fкро)
Kтеор = 0.951011
# Определим стехиометрическое соотношение компонентов кислород керосин
# Для примера возьмем условную формулу керосина С_12Н_26
# С_12Н_26 + nO_2 = 12CO_2 + 13H_2O
# Найдем n - количество молей О_2, необходимое для полного сгорания 1 моля С_12Н_26
# CO_2 содержит 12 х 2 = 24 атома О
# H_2O содержит 13 х 1 = 13 атома О
# Всего атомов О
24 + 13 = 37
# Каждая молекула О_2 содержит 2 атома, следовательно нужно 37/2 = 18.5 молей О_2
# Итак уравнение примет вид:
# С_12Н_26 + 18.5O_2 = 12CO_2 + 13H_2O
# Молекулярные массы С_12Н_26
# 12 х 12.01 +26 х 1.008 = 144.12 + 26.208 = 170.33 г/моль
# Молекулярные массы О_2
# 2 х 16 = 32 г/моль
# На 1 моль керосина требуется 18.5 молей кислорода
# Масса керосина
mкер := 170.33
# Масса кислорода
mкисл := 18.8*32
mкисл = 601.6
αо := mкисл/mкер
αо = 3.53197
# Реальное соотношение компонентов для топливной пары кислород керосин
αр := 0.8
# Реальный коэффициент соотношения будет равен
Kр := αо*αр
Kр = 2.82557
# Реальный удельный импульс, м/с
# Потери в камере
φк := 0.97
# Потери в сопле
φс := 0.98
# Тепловые потери
φтепл := 0.95
Iр := Io*φк*φс*φтепл
Iр = 2423.83
# Реальный массовый расход топлива, кг/с
mт := (Pк*10^3)/Iр
mт = 214.537
# Массовый расход окислителя, кг/с
mок := Kр/(Kр + 1)*mт
mок = 158.457
# Массовый расход горючего, кг/с
mг := 1/(Kр + 1)*mт
mг = 56.0796
# Действительная площадь минимального сечения и среза сопла, м^2
Fкрр := Fкро/(φк*φс*φтепл)
Fкрр = 0.121095
Fсрр := Fсро/(φк*φс*φтепл)
Fсрр = 0.853311
# Действительный диаметр критического сечения и среза сопла, м
dкрр := sqrt(4*Fкрр/π)
dкрр = 0.392661
dсрр := sqrt(4*Fсрр/π)
dсрр = 1.04234
# Действительный расходный комплекс, м/с
βр := Pкс*10^6*Fкрр/mт
βр = 2822.25
# Действительный коэффициент тяги
Kр := (Pк*10^3)/(Pкс*10^6*Fкрр)
Kр = 0.85883
t1 := 21900/((10.0 + 20 + 30.0)*1000/(504.5 + 525.5 + 540.5)) = 573.233  # c
mок1 := t1*mок = 90832.7  # кг
mг1 := t1*mг = 32146.6  # кг
# температура торможения
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Tо := 267*(1 + 0.2*(2741.5/a)^2) = 634.797
